// COMSOL Multiphysics 6.4.0.293 model "LiNRR_M01_2_flow_verification.mph"
// Outline of the model tree

Parameters
  Lcell = 55[mm]  // Specified electrolyte-channel length
  Hcell = 4[mm]  // Specified electrolyte-layer thickness
  Wcell = 55[mm]  // Specified out-of-plane active width
  T0 = 298.15[K]  // Specified operating temperature
  Qliq = 1.00000000000[cm^3/min]  // M01.2 flow sweep; baseline 1 cm^3/min; PROVISIONAL - numerical verification only
  rho_el = 900[kg/m^3]  // PROVISIONAL — numerical smoke test only
  mu_el = 3[mPa*s]  // PROVISIONAL — numerical smoke test only
  uin = Qliq/(Hcell*Wcell)  // Mean inlet velocity derived from flow rate
  tau_nominal = Lcell*Hcell*Wcell/Qliq  // Nominal channel-volume residence time
  sel_tol = 1e-6[mm]  // Coordinate-selection tolerance

Selections
  sel_electrolyte: Box "Electrolyte domain"
    entitydim = 2
    xmin = -sel_tol
    xmax = Lcell+sel_tol
    ymin = -sel_tol
    ymax = Hcell+sel_tol
    condition = inside
  sel_inlet: Box "Inlet boundary (left)"
    entitydim = 1
    xmin = -sel_tol
    xmax = sel_tol
    ymin = -sel_tol
    ymax = Hcell+sel_tol
    condition = inside
  sel_outlet: Box "Outlet boundary (right)"
    entitydim = 1
    xmin = Lcell-sel_tol
    xmax = Lcell+sel_tol
    ymin = -sel_tol
    ymax = Hcell+sel_tol
    condition = inside
  sel_anode_wall: Box "Anode wall (upper)"
    entitydim = 1
    xmin = -sel_tol
    xmax = Lcell+sel_tol
    ymin = Hcell-sel_tol
    ymax = Hcell+sel_tol
    condition = inside
  sel_cathode_wall: Box "Cathode wall (lower)"
    entitydim = 1
    xmin = -sel_tol
    xmax = Lcell+sel_tol
    ymin = -sel_tol
    ymax = sel_tol
    condition = inside

Geometry
  geom1 "Parameterized 2D channel geometry" (2D, length unit mm)
    r_channel: Rectangle "Electrolyte channel 55 mm x 4 mm" | size = {Lcell, Hcell}
    fin: Finalize "形成联合体"

Materials
  mat_electrolyte: Common "Electrolyte | PROVISIONAL — numerical smoke test only" on selection sel_electrolyte
    def: def "基本"
      density = rho_el
      dynamicviscosity = mu_el

Physics
  spf: LaminarFlow "Stationary laminar electrolyte flow" on selection sel_electrolyte
    dependent variable u = {u, v, w}
    ShapeProperty.order_fluid = 2
    fp1: FluidProperties "流体属性 1" (default)
    init1: init "初始值 1" (default)
    wallbc1: WallBC "壁 1" (default)
    wall_anode: WallBC "No slip: anode wall" on selection sel_anode_wall
    wall_cathode: WallBC "No slip: cathode wall" on selection sel_cathode_wall
    inlet: Inlet "Fully developed inlet with mean velocity uin (+x)" on selection sel_inlet
      BoundaryCondition = LaminarInflow
      Uav = uin
    outlet: Outlet "Zero-gauge-pressure outlet" on selection sel_outlet
      BoundaryCondition = LaminarOutflow
      p0 = 0[Pa]
      LaminarOutflowOption = p0_exit
      p0_exit = 0[Pa]

Mesh
  mesh1 "M01.2 mapped mesh 160 x 80"
    size: MeshSizeDefault "大小" | hmax = 3.69; hmin = 0.0165; hcurve = 0.3; hgrad = 1.3
    map_channel: Map "映射" on selection sel_electrolyte
      dist_height: Distribution "200 elements through Hcell" on selection sel_inlet | numelem = 80
      dist_length: Distribution "100 elements along Lcell" on selection sel_cathode_wall | numelem = 160

Studies
  std_flow "M01 stationary laminar-flow study"
    stat: Stationary "Stationary flow solution"

Solver configurations
  sol1 "解 1" (study std_flow)
    v1: Variables "因变量 1"
    s1: Stationary "稳态求解器 1"
      fc1: FullyCoupled "全耦合 1"
      d1: Direct "直接，流体流动变量 (spf)"

Datasets
  dset1: Solution | solution = sol1
  m012_vertical_mid: CutLine2D "M01.2 mid-channel cross-section x=Lcell/2"
    data = dset1
    genpoints = {{27.5, 0}, {27.5, 4}}
  m012_center_point: CutPoint2D "M01.2 mid-channel center point" | data = dset1; pointx = 27.5; pointy = 2.0
  m012_centerline: CutLine2D "M01.2 centerline excluding inlet/outlet end regions"
    data = dset1
    genpoints = {{1.1, 2}, {53.9, 2}}

Derived values
  eval_uin: EvalGlobal "Inlet mean velocity" | data = dset1; expr = uin/(1[m/s]); unit = 1
  max_speed: MaxSurface "Maximum velocity magnitude" on selection sel_electrolyte
    data = dset1
    expr = spf.U/(1[m/s])
    unit = 1
  mdot_in: IntLine "Signed inlet mass flow" on selection sel_inlet
    data = dset1
    expr = rho_el*(u*nx+v*ny)*Wcell/(1[kg/s])
    unit = 1
  mdot_out: IntLine "Signed outlet mass flow" on selection sel_outlet
    data = dset1
    expr = rho_el*(u*nx+v*ny)*Wcell/(1[kg/s])
    unit = 1
  p_in: AvLine "Average inlet pressure" on selection sel_inlet | data = dset1; expr = p/(1[Pa]); unit = 1
  p_out: AvLine "Average outlet pressure" on selection sel_outlet | data = dset1; expr = p/(1[Pa]); unit = 1
  tau: EvalGlobal "Nominal residence time" | data = dset1; expr = tau_nominal/(1[s]); unit = 1
  m012_u_center: EvalPoint "点计算" | data = m012_center_point; expr = u; unit = m/s
  m012_u_mean: AvLine "线平均" | data = m012_vertical_mid; expr = u; unit = m/s; intorder = 8
  m012_dpdx_mid: AvLine "线平均 2" | data = m012_vertical_mid; expr = d(p,x); unit = Pa/m; intorder = 8
  m012_mdot_in: IntLine "线积分" on selection sel_inlet
    data = dset1
    expr = rho_el*(u*nx+v*ny)*Wcell
    unit = kg/s
    intorder = 8
  m012_mdot_out: IntLine "线积分 2" on selection sel_outlet
    data = dset1
    expr = rho_el*(u*nx+v*ny)*Wcell
    unit = kg/s
    intorder = 8
  m012_p_in: AvLine "线平均 3" on selection sel_inlet | data = dset1; expr = p; unit = Pa; intorder = 8
  m012_p_out: AvLine "线平均 4" on selection sel_outlet | data = dset1; expr = p; unit = Pa; intorder = 8
  m012_tau_upper: AvLine "线平均 5" on selection sel_anode_wall | data = dset1; expr = mu_el*(uy+vx); unit = Pa; intorder = 8
  m012_tau_lower: AvLine "线平均 6" on selection sel_cathode_wall
    data = dset1
    expr = mu_el*(uy+vx)
    unit = Pa
    intorder = 8

Plots
  pg_velocity: PlotGroup2D "M01 velocity magnitude and arrows" | data = dset1
    surf_speed: Surface "Velocity magnitude" | expr = spf.U
    arrow_velocity: ArrowSurface "Velocity arrows" | expr = {u, v}
  pg_pressure: PlotGroup2D "M01 pressure field" | data = dset1
    surf_pressure: Surface "Gauge pressure" | expr = p
  m012_pg_velocity: PlotGroup1D "M01.2 mid-channel velocity profile" | data = m012_vertical_mid
    line: LineGraph "线结果图" | expr = u; unit = m/s
  m012_pg_gradient: PlotGroup1D "M01.2 centerline pressure gradient" | data = m012_centerline
    line: LineGraph "线结果图" | expr = d(p,x); unit = Pa/m
  m012_pg_shear: PlotGroup1D "M01.2 signed upper and lower wall shear" | data = dset1
    upper: LineGraph "Upper wall (signed)" on selection sel_anode_wall | expr = mu_el*(uy+vx); unit = Pa
    lower: LineGraph "Lower wall (signed)" on selection sel_cathode_wall | expr = mu_el*(uy+vx); unit = Pa

Exports
  img_velocity: Image "图像" | source = /Results/ResultFeatureList/pg_velocity; sourceobject = pg_velocity
  img_pressure: Image "图像 2" | source = /Results/ResultFeatureList/pg_pressure; sourceobject = pg_pressure
  m012_img_velocity: Image "图像 3" | source = /Results/ResultFeatureList/m012_pg_velocity; sourceobject = m012_pg_velocity
  m012_img_gradient: Image "图像 4" | source = /Results/ResultFeatureList/m012_pg_gradient; sourceobject = m012_pg_gradient
  m012_img_shear: Image "图像 5" | source = /Results/ResultFeatureList/m012_pg_shear; sourceobject = m012_pg_shear