// COMSOL Multiphysics 6.4.0.293 model "LiNRR_M02_2_diffusion_operator.mph"
// Outline of the model tree

Parameters
  Lcell = 55[mm]  // PROVISIONAL benchmark length
  Hcell = 4[mm]  // PROVISIONAL benchmark height
  Wcell = 55[mm]  // PROVISIONAL out-of-plane width
  sel_tol = 1e-6[mm]  // Coordinate selection tolerance
  cN2_in = 5[mol/m^3]  // PROVISIONAL - numerical verification only; not experimental validation
  U0 = 1e-4[m/s]  // Prescribed divergence-free benchmark velocity
  D_u = 2e-9[m^2/s]  // PROVISIONAL - numerical verification only; not experimental validation
  c_left = 1[mol/m^3]  // Diffusion benchmark left concentration
  c_right = 2[mol/m^3]  // Diffusion benchmark right concentration
  D_diff = 2e-9[m^2/s]  // PROVISIONAL - numerical verification only; not experimental validation
  c_ref = 5[mol/m^3]  // Strictly positive MMS reference
  a_mms = 0.1  // MMS sinusoidal amplitude
  U_mms = 2e-6[m/s]  // MMS prescribed velocity
  D_mms = 2e-9[m^2/s]  // MMS diffusion coefficient

Variables
  var_exact "变量" on selection sel_d_domain
    c_diff_exact = c_left+(c_right-c_left)*x/Lcell  // Linear analytical solution

Selections
  sel_d_domain: Box "框"
    entitydim = 2
    xmin = -sel_tol
    xmax = Lcell+sel_tol
    ymin = -sel_tol
    ymax = Hcell+sel_tol
    condition = inside
  sel_d_inlet: Box "框 2"
    entitydim = 1
    xmin = -sel_tol
    xmax = sel_tol
    ymin = -sel_tol
    ymax = Hcell+sel_tol
    condition = inside
  sel_d_outlet: Box "框 3"
    entitydim = 1
    xmin = Lcell-sel_tol
    xmax = Lcell+sel_tol
    ymin = -sel_tol
    ymax = Hcell+sel_tol
    condition = inside
  sel_d_top: Box "框 4"
    entitydim = 1
    xmin = -sel_tol
    xmax = Lcell+sel_tol
    ymin = Hcell-sel_tol
    ymax = Hcell+sel_tol
    condition = inside
  sel_d_bottom: Box "框 5"
    entitydim = 1
    xmin = -sel_tol
    xmax = Lcell+sel_tol
    ymin = -sel_tol
    ymax = sel_tol
    condition = inside
  sel_d_all: Box "框 6"
    entitydim = 1
    xmin = -sel_tol
    xmax = Lcell+sel_tol
    ymin = -sel_tol
    ymax = Hcell+sel_tol
    condition = inside

Geometry
  geom_d "几何" (2D, length unit mm)
    rect: Rectangle "矩形" | size = {Lcell, Hcell}
    fin: Finalize "形成联合体"

Physics
  tds_d: DilutedSpecies "稀物质传递" on selection sel_d_domain
    dependent variable cDiff
    ShapeProperty.order_concentration = 2
    MassConsistentStabilization.massStreamlineDiffusion = 1
    MassConsistentStabilization.massCrosswindDiffusion = 1
    AdvancedSettings.ConvectiveTerm = cons
    cdm1: Fluid "流体 1" (default) | u = {0[m/s], 0[m/s], 0[m/s]}; D_cDiff_mat = userdef; D_cDiff = D_diff
    nflx1: NoFlux "无通量 1" (default)
    init1: init "初始值 1" (default)
    left_c: Concentration "浓度" on selection sel_d_inlet | species = 1; c0 = c_left
    right_c: Concentration "浓度 2" on selection sel_d_outlet | species = 1; c0 = c_right
    noflux_top: NoFlux "无通量" on selection sel_d_top
    noflux_bottom: NoFlux "无通量 2" on selection sel_d_bottom

Mesh
  mesh_d "网格"
    size: MeshSizeDefault "大小" | hmax = 3.69; hmin = 0.0165; hcurve = 0.3; hgrad = 1.3
    map: Map "映射" on selection sel_d_domain
      dx: Distribution "分布" on selection sel_d_bottom | numelem = 160
      dy: Distribution "分布 2" on selection sel_d_inlet | numelem = 80

Studies
  std_d "研究"
    stat: Stationary "稳态"

Solver configurations
  sol1 "解 1" (study std_d)
    v1: Variables "因变量 1"
    s1: Stationary "稳态求解器 1"
      fc1: FullyCoupled "全耦合 1"
      d1: Direct "直接，浓度 (tds_d)"

Datasets
  dset1: Solution | solution = sol1
  cln_diff: CutLine2D "二维截线" | data = dset1; genpoints = {{0, 2}, {55, 2}}

Derived values
  d_err2: IntSurface "面积分 2" on domains 1 | data = dset1; expr = (cDiff-c_diff_exact)^2; intorder = 8
  d_exact2: IntSurface "面积分 2a" on domains 1 | data = dset1; expr = c_diff_exact^2; intorder = 8
  d_linf: MaxSurface "表面最大值" on domains 1 | data = dset1; expr = abs(cDiff-c_diff_exact); unit = mol/m^3
  d_min: MinSurface "表面最小值" on domains 1 | data = dset1; expr = cDiff; unit = mol/m^3
  d_max: MaxSurface "表面最大值 2" on domains 1 | data = dset1; expr = cDiff; unit = mol/m^3
  d_slope: AvSurface "表面平均" on domains 1 | data = dset1; expr = cDiffx; unit = mol/m^4
  d_left_flux: IntLine "线积分" on boundaries 1
    data = dset1
    expr = nx*(-D_diff*cDiffx)*Wcell+ny*(-D_diff*cDiffy)*Wcell
    unit = mol/s
    intorder = 8
  d_right_flux: IntLine "线积分 2" on boundaries 4
    data = dset1
    expr = nx*(-D_diff*cDiffx)*Wcell+ny*(-D_diff*cDiffy)*Wcell
    unit = mol/s
    intorder = 8

Plots
  pg_diff: PlotGroup1D "M02.2 linear diffusion - numerical verification" | data = cln_diff
    line_num: LineGraph "线结果图" | expr = cDiff; unit = mol/m^3
    line_exact: LineGraph "线结果图 2" | expr = c_diff_exact; unit = mol/m^3

Exports
  img_diff: Image "图像" | source = /Results/ResultFeatureList/pg_diff; sourceobject = pg_diff