// COMSOL Multiphysics 6.4.0.293 model "LiNRR_M02_2_operator_benchmarks.mph"
// Outline of the model tree

Parameters
  Lcell = 55[mm]  // PROVISIONAL benchmark length
  Hcell = 4[mm]  // PROVISIONAL benchmark height
  Wcell = 55[mm]  // PROVISIONAL out-of-plane width
  sel_tol = 1e-6[mm]  // Coordinate selection tolerance
  cN2_in = 5[mol/m^3]  // PROVISIONAL - numerical verification only; not experimental validation
  U0 = 1e-4[m/s]  // Prescribed divergence-free benchmark velocity
  D_u = 2e-9[m^2/s]  // PROVISIONAL - numerical verification only; not experimental validation
  c_left = 1[mol/m^3]  // Diffusion benchmark left concentration
  c_right = 2[mol/m^3]  // Diffusion benchmark right concentration
  D_diff = 2e-9[m^2/s]  // PROVISIONAL - numerical verification only; not experimental validation
  c_ref = 5[mol/m^3]  // Strictly positive MMS reference
  a_mms = 0.1  // MMS sinusoidal amplitude
  U_mms = 2e-6[m/s]  // MMS prescribed velocity
  D_mms = 2e-9[m^2/s]  // MMS diffusion coefficient

Variables
  var_mms "变量" on selection sel_m_domain
    c_mms_exact = c_ref*(1+a_mms*sin(pi*x/Lcell)*sin(pi*y/Hcell))  // Strictly positive manufactured solution
    R_mms_exact = D_mms*c_ref*a_mms*((pi/Lcell)^2+(pi/Hcell)^2)*sin(pi*x/Lcell)*sin(pi*y/Hcell)+U_mms*c_ref*a_mms*(pi/Lcell)*cos(pi*x/Lcell)*sin(pi*y/Hcell)  // Manufactured source for div(N)=R

Selections
  sel_m_domain: Box "框"
    entitydim = 2
    xmin = -sel_tol
    xmax = Lcell+sel_tol
    ymin = -sel_tol
    ymax = Hcell+sel_tol
    condition = inside
  sel_m_inlet: Box "框 2"
    entitydim = 1
    xmin = -sel_tol
    xmax = sel_tol
    ymin = -sel_tol
    ymax = Hcell+sel_tol
    condition = inside
  sel_m_outlet: Box "框 3"
    entitydim = 1
    xmin = Lcell-sel_tol
    xmax = Lcell+sel_tol
    ymin = -sel_tol
    ymax = Hcell+sel_tol
    condition = inside
  sel_m_top: Box "框 4"
    entitydim = 1
    xmin = -sel_tol
    xmax = Lcell+sel_tol
    ymin = Hcell-sel_tol
    ymax = Hcell+sel_tol
    condition = inside
  sel_m_bottom: Box "框 5"
    entitydim = 1
    xmin = -sel_tol
    xmax = Lcell+sel_tol
    ymin = -sel_tol
    ymax = sel_tol
    condition = inside
  sel_m_all: Box "框 6"
    entitydim = 1
    xmin = -sel_tol
    xmax = Lcell+sel_tol
    ymin = -sel_tol
    ymax = Hcell+sel_tol
    condition = inside

Geometry
  geom_m "几何" (2D, length unit mm)
    rect: Rectangle "矩形" | size = {Lcell, Hcell}
    fin: Finalize "形成联合体"

Physics
  tds_m: DilutedSpecies "稀物质传递" on selection sel_m_domain
    dependent variable cMms
    ShapeProperty.order_concentration = 2
    MassConsistentStabilization.massStreamlineDiffusion = 1
    MassConsistentStabilization.massCrosswindDiffusion = 1
    AdvancedSettings.ConvectiveTerm = cons
    cdm1: Fluid "流体 1" (default) | u = {U_mms, 0[m/s], 0[m/s]}; D_cMms_mat = userdef; D_cMms = D_mms
    nflx1: NoFlux "无通量 1" (default)
    init1: init "初始值 1" (default)
    source_mms: Reactions "反应" on selection sel_m_domain | R_cMms = R_mms_exact
    exact_boundary: Concentration "浓度" on selection sel_m_all | species = 1; c0 = c_mms_exact

Mesh
  mesh_m "网格"
    size: MeshSizeDefault "大小" | hmax = 3.69; hmin = 0.0165; hcurve = 0.3; hgrad = 1.3
    map: Map "映射" on selection sel_m_domain
      dx: Distribution "分布" on selection sel_m_bottom | numelem = 160
      dy: Distribution "分布 2" on selection sel_m_inlet | numelem = 80

Studies
  std_m "研究"
    stat: Stationary "稳态"

Solver configurations
  sol1 "解 1" (study std_m)
    v1: Variables "因变量 1"
    s1: Stationary "稳态求解器 1"
      fc1: FullyCoupled "全耦合 1"
      d1: Direct "直接，浓度 (tds_m)"

Datasets
  dset1: Solution | solution = sol1

Derived values
  m_err2: IntSurface "面积分 2" on domains 1 | data = dset1; expr = (cMms-c_mms_exact)^2; intorder = 8
  m_exact2: IntSurface "面积分 2a" on domains 1 | data = dset1; expr = c_mms_exact^2; intorder = 8
  m_linf: MaxSurface "表面最大值" on domains 1 | data = dset1; expr = abs(cMms-c_mms_exact); unit = mol/m^3
  m_min: MinSurface "表面最小值" on domains 1 | data = dset1; expr = cMms; unit = mol/m^3
  m_source: IntSurface "面积分" on domains 1 | data = dset1; expr = R_mms_exact*Wcell; intorder = 8
  m_flux: IntLine "线积分" on boundaries 1-4
    data = dset1
    expr = nx*(U_mms*cMms-D_mms*cMmsx)*Wcell-ny*D_mms*cMmsy*Wcell
    unit = mol/s
    intorder = 8