// COMSOL Multiphysics 6.4.0.293 model "LiNRR_M02_2_transport_verification.mph"
// Outline of the model tree

Parameters
  Lcell = 55[mm]  // Specified channel length
  Hcell = 4[mm]  // Specified liquid layer thickness
  Wcell = 55[mm]  // Specified out-of-plane width
  Qliq = Umean_target*Hcell*Wcell  // Base liquid flow
  rho_el = 900[kg/m^3]  // PROVISIONAL — numerical audit only; not experimentally validated
  mu_el = 3[mPa*s]  // PROVISIONAL — numerical audit only; not experimentally validated
  DN2 = 2e-9[m^2/s]  // PROVISIONAL — numerical audit only; not experimentally validated
  DNH3 = 2e-9[m^2/s]  // PROVISIONAL — numerical audit only; not experimentally validated
  cN2_in = 5[mol/m^3]  // PROVISIONAL — numerical audit only; not experimentally validated
  cNH3_in = 0[mol/m^3]  // PROVISIONAL — numerical audit only; not experimentally validated
  kN2 = Da_H_target*DN2/Hcell  // PROVISIONAL — numerical audit only; not experimentally validated; phenomenological wall law
  reaction_on = 1  // Audit reaction switch
  uin = Qliq/(Hcell*Wcell)  // Mean inlet velocity
  sel_tol = 1e-6[mm]  // Coordinate selection tolerance
  Acath = Lcell*Wcell  // Cathode area represented by 2D edge
  Pe_H_target = 10  // M02.2 height-based Peclet target
  Da_H_target = 1e-3  // M02.2 height-based Damkohler target
  Umean_target = Pe_H_target*DN2/Hcell

Variables
  var_rxn "变量" on selection sel_cathode_wall
    rN2 = kN2*cN2  // Positive phenomenological N2 consumption flux
    rNH3 = 2*rN2  // NH3 generation flux; nitrogen-atom stoichiometry

Selections
  sel_electrolyte: Box "Electrolyte domain"
    entitydim = 2
    xmin = -sel_tol
    xmax = Lcell+sel_tol
    ymin = -sel_tol
    ymax = Hcell+sel_tol
    condition = inside
  sel_inlet: Box "Inlet boundary"
    entitydim = 1
    xmin = -sel_tol
    xmax = sel_tol
    ymin = -sel_tol
    ymax = Hcell+sel_tol
    condition = inside
  sel_outlet: Box "Outlet boundary"
    entitydim = 1
    xmin = Lcell-sel_tol
    xmax = Lcell+sel_tol
    ymin = -sel_tol
    ymax = Hcell+sel_tol
    condition = inside
  sel_anode_wall: Box "Upper no-flux wall"
    entitydim = 1
    xmin = -sel_tol
    xmax = Lcell+sel_tol
    ymin = Hcell-sel_tol
    ymax = Hcell+sel_tol
    condition = inside
  sel_cathode_wall: Box "Lower reactive wall"
    entitydim = 1
    xmin = -sel_tol
    xmax = Lcell+sel_tol
    ymin = -sel_tol
    ymax = sel_tol
    condition = inside
  sel_all_boundaries: Box "All boundaries for closure"
    entitydim = 1
    xmin = -sel_tol
    xmax = Lcell+sel_tol
    ymin = -sel_tol
    ymax = Hcell+sel_tol
    condition = inside

Geometry
  geom1 "几何 1" (2D, length unit mm)
    r_channel: Rectangle "矩形" | size = {Lcell, Hcell}
    fin: Finalize "形成联合体"

Materials
  mat_electrolyte: Common "材料" on selection sel_electrolyte
    def: def "基本"
      density = rho_el
      dynamicviscosity = mu_el

Physics
  spf: LaminarFlow "层流" on selection sel_electrolyte
    dependent variable u = {u, v, w}
    fp1: FluidProperties "流体属性 1" (default)
    init1: init "初始值 1" (default)
    wallbc1: WallBC "壁 1" (default)
    wall_anode: WallBC "壁" on selection sel_anode_wall
    wall_cathode: WallBC "壁 2" on selection sel_cathode_wall
    inlet: Inlet "入口" on selection sel_inlet | BoundaryCondition = LaminarInflow; Uav = uin
    outlet: Outlet "出口" on selection sel_outlet | p0 = 0[Pa]
  tds: DilutedSpecies "M02.1 N2/NH3 transport | PROVISIONAL — numerical audit only; not experimentally validated" on selection sel_electrolyte
    dependent variable cN2 = {cN2, cNH3}
    ShapeProperty.order_concentration = 2
    MassConsistentStabilization.massStreamlineDiffusion = 1
    MassConsistentStabilization.massCrosswindDiffusion = 1
    AdvancedSettings.ConvectiveTerm = cons
    cdm1: Fluid "流体 1" (default) | u = {u, v, 0}; D_cN2_mat = userdef; D_cN2 = DN2; D_cNH3_mat = userdef; D_cNH3 = DNH3
    nflx1: NoFlux "无通量 1" (default)
    init1: init "初始值 1" (default) | initc = {cN2_in, cNH3_in}
    conc_in: Concentration "浓度" (disabled) on selection sel_inlet | species = {1, 1}; c0 = {cN2_in, cNH3_in}
    inflow_audit: Inflow "流入" on selection sel_inlet | c0 = {cN2_in, cNH3_in}; BoundaryConditionType = FluxDanckwerts
    outflow: Outflow "流出" on selection sel_outlet
    noflux_anode: NoFlux "无通量" on selection sel_anode_wall
    flux_cathode: FluxBoundary "通量" on selection sel_cathode_wall
      FluxType = GeneralInwardFlux
      species = {1, 1}
      J0 = {-reaction_on*rN2, reaction_on*rNH3}

Mesh
  mesh1 "网格 1"
    size: MeshSizeDefault "大小" | hmax = 3.69; hmin = 0.0165; hcurve = 0.3; hgrad = 1.3
    map_channel: Map "映射" on selection sel_electrolyte
      dist_height: Distribution "分布" on selection sel_inlet | type = predefined; elemcount = 160
      dist_length: Distribution "分布 2" on selection sel_cathode_wall | type = predefined; elemcount = 320

Studies
  std_audit "M02.1 stationary transport audit"
    stat: Stationary "稳态"

Solver configurations
  sol1 "解 1" (study std_audit)
    v1: Variables "因变量 1"
    s1: Stationary "稳态求解器 1"
      fc1: FullyCoupled "全耦合 1"
      d1: Direct "直接，流体流动变量 (spf)"

Datasets
  dset1: Solution | solution = sol1

Derived values
  n2_in_nt: IntLine "线积分" on selection sel_inlet | data = dset1; expr = tds.ntflux_cN2*Wcell; unit = mol/s; intorder = 8
  n2_out_nt: IntLine "线积分 2" on selection sel_outlet
    data = dset1
    expr = tds.ntflux_cN2*Wcell
    unit = mol/s
    intorder = 8
  nh3_in_nt: IntLine "线积分 3" on selection sel_inlet
    data = dset1
    expr = tds.ntflux_cNH3*Wcell
    unit = mol/s
    intorder = 8
  nh3_out_nt: IntLine "线积分 4" on selection sel_outlet
    data = dset1
    expr = tds.ntflux_cNH3*Wcell
    unit = mol/s
    intorder = 8
  n2_cath_nt: IntLine "线积分 5" on selection sel_cathode_wall
    data = dset1
    expr = tds.ntflux_cN2*Wcell
    unit = mol/s
    intorder = 8
  nh3_cath_nt: IntLine "线积分 6" on selection sel_cathode_wall
    data = dset1
    expr = tds.ntflux_cNH3*Wcell
    unit = mol/s
    intorder = 8
  n2_anode_nt: IntLine "线积分 7" on selection sel_anode_wall
    data = dset1
    expr = tds.ntflux_cN2*Wcell
    unit = mol/s
    intorder = 8
  nh3_anode_nt: IntLine "线积分 8" on selection sel_anode_wall
    data = dset1
    expr = tds.ntflux_cNH3*Wcell
    unit = mol/s
    intorder = 8
  n2_all_nt: IntLine "线积分 9" on selection sel_all_boundaries
    data = dset1
    expr = tds.ntflux_cN2*Wcell
    unit = mol/s
    intorder = 8
  nh3_all_nt: IntLine "线积分 10" on selection sel_all_boundaries
    data = dset1
    expr = tds.ntflux_cNH3*Wcell
    unit = mol/s
    intorder = 8
  n2_inlet_adv: IntLine "线积分 11" on selection sel_inlet
    data = dset1
    expr = (u*cN2*nx+v*cN2*ny)*Wcell
    unit = mol/s
    intorder = 8
  n2_inlet_diff: IntLine "线积分 12" on selection sel_inlet
    data = dset1
    expr = -DN2*(nx*cN2x+ny*cN2y)*Wcell
    unit = mol/s
    intorder = 8
  nh3_inlet_adv: IntLine "线积分 13" on selection sel_inlet
    data = dset1
    expr = (u*cNH3*nx+v*cNH3*ny)*Wcell
    unit = mol/s
    intorder = 8
  nh3_inlet_diff: IntLine "线积分 14" on selection sel_inlet
    data = dset1
    expr = -DNH3*(nx*cNH3x+ny*cNH3y)*Wcell
    unit = mol/s
    intorder = 8
  n2_outlet_adv: IntLine "线积分 15" on selection sel_outlet
    data = dset1
    expr = (u*cN2*nx+v*cN2*ny)*Wcell
    unit = mol/s
    intorder = 8
  n2_outlet_diff: IntLine "线积分 16" on selection sel_outlet
    data = dset1
    expr = -DN2*(nx*cN2x+ny*cN2y)*Wcell
    unit = mol/s
    intorder = 8
  nh3_outlet_adv: IntLine "线积分 17" on selection sel_outlet
    data = dset1
    expr = (u*cNH3*nx+v*cNH3*ny)*Wcell
    unit = mol/s
    intorder = 8
  nh3_outlet_diff: IntLine "线积分 18" on selection sel_outlet
    data = dset1
    expr = -DNH3*(nx*cNH3x+ny*cNH3y)*Wcell
    unit = mol/s
    intorder = 8
  n2_all_exp: IntLine "线积分 19" on selection sel_all_boundaries
    data = dset1
    expr = ((u*cN2*nx+v*cN2*ny)*Wcell)+((-DN2*(nx*cN2x+ny*cN2y)*Wcell))
    unit = mol/s
    intorder = 8
  nh3_all_exp: IntLine "线积分 20" on selection sel_all_boundaries
    data = dset1
    expr = ((u*cNH3*nx+v*cNH3*ny)*Wcell)+((-DNH3*(nx*cNH3x+ny*cNH3y)*Wcell))
    unit = mol/s
    intorder = 8
  n2_consumed: IntLine "线积分 21" on selection sel_cathode_wall
    data = dset1
    expr = reaction_on*rN2*Wcell
    unit = mol/s
    intorder = 8
  nh3_generated: IntLine "线积分 22" on selection sel_cathode_wall
    data = dset1
    expr = reaction_on*rNH3*Wcell
    unit = mol/s
    intorder = 8
  min_n2: MinSurface "表面最小值 2" on selection sel_electrolyte | data = dset1; expr = cN2; unit = mol/m^3
  min_nh3: MinSurface "表面最小值 3" on selection sel_electrolyte | data = dset1; expr = cNH3; unit = mol/m^3
  min_cath_n2: MinLine "线最小值 2" on selection sel_cathode_wall | data = dset1; expr = cN2; unit = mol/m^3
  avg_cath_n2: AvLine "线平均 2" on selection sel_cathode_wall | data = dset1; expr = cN2; unit = mol/m^3; intorder = 8
  m022_n2_in: IntLine "线积分 23" on boundaries 1 | data = dset1; expr = tds.ntflux_cN2*Wcell; unit = mol/s; intorder = 8
  m022_n2_out: IntLine "线积分 24" on boundaries 4 | data = dset1; expr = tds.ntflux_cN2*Wcell; unit = mol/s; intorder = 8
  m022_nh3_in: IntLine "线积分 25" on boundaries 1 | data = dset1; expr = tds.ntflux_cNH3*Wcell; unit = mol/s; intorder = 8
  m022_nh3_out: IntLine "线积分 26" on boundaries 4 | data = dset1; expr = tds.ntflux_cNH3*Wcell; unit = mol/s; intorder = 8
  m022_n2_cons: IntLine "线积分 27" on boundaries 2 | data = dset1; expr = rN2*Wcell; unit = mol/s; intorder = 8
  m022_nh3_gen: IntLine "线积分 28" on boundaries 2 | data = dset1; expr = rNH3*Wcell; unit = mol/s; intorder = 8
  m022_min_n2: MinSurface "表面最小值 2a" on domains 1 | data = dset1; expr = cN2; unit = mol/m^3
  m022_max_n2: MaxSurface "表面最大值 2" on domains 1 | data = dset1; expr = cN2; unit = mol/m^3
  m022_min_nh3: MinSurface "表面最小值 3a" on domains 1 | data = dset1; expr = cNH3; unit = mol/m^3
  m022_max_nh3: MaxSurface "表面最大值 3" on domains 1 | data = dset1; expr = cNH3; unit = mol/m^3

Plots
  m022_pg_low_da: PlotGroup1D "M02.2 low-Da species - numerical verification" | data = dset1
    n2: LineGraph "线结果图 2" on selection sel_cathode_wall | expr = cN2; unit = mol/m^3
    nh3: LineGraph "线结果图 3" on selection sel_cathode_wall | expr = cNH3; unit = mol/m^3

Exports
  m022_img_low_da: Image "图像" | source = /Results/ResultFeatureList/m022_pg_low_da; sourceobject = m022_pg_low_da