// COMSOL Multiphysics 6.4.0.293 model "LiNRR_M03A_4_parameter_transfer_dry_run.mph"
// Outline of the model tree

Parameters
  Lcell = 55[mm]  // Specified channel length
  Hcell = Hcell_dry_run  // Transferred geometry height
  Wcell = depth_dry_run  // Transferred 2D-to-3D integration depth
  Qliq = 7.575757575757576e-5[m/s]*Hcell*Wcell  // Synthetic low-conversion flow
  rho_el = 900[kg/m^3]  // PROVISIONAL — numerical audit only; not experimentally validated
  mu_el = 3[mPa*s]  // PROVISIONAL — numerical audit only; not experimentally validated
  DN2 = 2e-9[m^2/s]  // PROVISIONAL — numerical audit only; not experimentally validated
  DNH3 = 2e-9[m^2/s]  // PROVISIONAL — numerical audit only; not experimentally validated
  cN2_in = 5[mol/m^3]  // PROVISIONAL — numerical audit only; not experimentally validated
  cNH3_in = 0[mol/m^3]  // PROVISIONAL — numerical audit only; not experimentally validated
  kN2 = Da_H_target*DN2/Hcell  // PROVISIONAL — numerical audit only; not experimentally validated; phenomenological wall law
  reaction_on = 1  // Legacy switch fixed on; FE_prescribed controls coupling
  uin = Qliq/(Hcell*Wcell)  // Mean inlet velocity
  sel_tol = 1e-6[mm]  // Coordinate selection tolerance
  Acath = Lcell*Wcell  // Cathode area represented by 2D edge
  Pe_H_target = 10  // M02.2 height-based Peclet target
  Da_H_target = 1e-3  // M02.2 height-based Damkohler target
  Umean_target = Pe_H_target*DN2/Hcell
  kappa_M033 = kappa_dry_run  // Transferred Primary Current Distribution conductivity
  DeltaPhi_M033 = 8e-5[V]  // Synthetic low-conversion potential difference
  FE_prescribed = 1  // Synthetic prescribed Faraday mapping not a prediction
  F_const_M033 = 96485.33212[C/mol]  // Faraday constant
  Aeq_M033 = Lcell*Wcell  // 3D equivalent current-carrying area
  j_app_M033 = kappa_M033*DeltaPhi_M033/Hcell  // Prescribed positive current-density magnitude at upper current boundary
  I_analytic_M033 = kappa_M033*Aeq_M033*DeltaPhi_M033/Hcell
  R_analytic_M033 = Hcell/(kappa_M033*Aeq_M033)
  kappa_dry_run = 0.5454161958786391[S/m]  // M03A4_META_V1|target_parameter=kappa_dry_run|applied_value=0.545416195879|applied_unit=S/m|data_origin=SYNTHETIC|source_sha256=a24d1727419c1f2a8fbb9b364859bbb2a4ef4fbc62c4669244cd19b1b79d4379|resolved_sha256=c76b81c8d375653c6713e5c39ece809c575af6a660cce9154e98ef0af475f538|case_id=COMBINED_NONIDENTITY|quantity_name=conductivity
  Hcell_dry_run = 0.0047999999999999996[m]  // M03A4_META_V1|target_parameter=Hcell_dry_run|applied_value=0.0048|applied_unit=m|data_origin=SYNTHETIC|source_sha256=a24d1727419c1f2a8fbb9b364859bbb2a4ef4fbc62c4669244cd19b1b79d4379|resolved_sha256=c76b81c8d375653c6713e5c39ece809c575af6a660cce9154e98ef0af475f538|case_id=COMBINED_NONIDENTITY|quantity_name=electrode_spacing
  depth_dry_run = 0.049500000000000002[m]  // M03A4_META_V1|target_parameter=depth_dry_run|applied_value=0.0495|applied_unit=m|data_origin=SYNTHETIC|source_sha256=a24d1727419c1f2a8fbb9b364859bbb2a4ef4fbc62c4669244cd19b1b79d4379|resolved_sha256=c76b81c8d375653c6713e5c39ece809c575af6a660cce9154e98ef0af475f538|case_id=COMBINED_NONIDENTITY|quantity_name=out_of_plane_thickness
  A_EIS_dry_run = 0.0033275000000000002[m^2]  // M03A4_META_V1|target_parameter=A_EIS_dry_run|applied_value=0.0033275|applied_unit=m^2|data_origin=SYNTHETIC|source_sha256=a24d1727419c1f2a8fbb9b364859bbb2a4ef4fbc62c4669244cd19b1b79d4379|resolved_sha256=c76b81c8d375653c6713e5c39ece809c575af6a660cce9154e98ef0af475f538|case_id=COMBINED_NONIDENTITY|quantity_name=EIS_area
  A_j_report_dry_run = 0.0030249999999999999[m^2]  // M03A4_META_V1|target_parameter=A_j_report_dry_run|applied_value=0.003025|applied_unit=m^2|data_origin=SYNTHETIC|source_sha256=a24d1727419c1f2a8fbb9b364859bbb2a4ef4fbc62c4669244cd19b1b79d4379|resolved_sha256=c76b81c8d375653c6713e5c39ece809c575af6a660cce9154e98ef0af475f538|case_id=COMBINED_NONIDENTITY|quantity_name=current_density_reporting_area
  R_electrolyte_dry_run = 2.6448140495850003[ohm]  // Canonical resolved de-embedded electrolyte resistance
  H_EIS_inversion_M034 = 0.0048000000000000000[m]  // Spacing used by the selected conductivity inversion case
  kappa_HFR_audit_M034 = H_EIS_inversion_M034/(A_EIS_dry_run*R_electrolyte_dry_run)  // Fixed whitelist HFR inversion audit
  M034_resolved_artifact_sha256 = 1  // Full canonical resolved artifact SHA-256: c76b81c8d375653c6713e5c39ece809c575af6a660cce9154e98ef0af475f538
  I_total_M034 = 2.4748259887992820e-05[A]  // Current-run integrated total current
  j_reported_M034 = I_total_M034/A_j_report_dry_run  // Current-run total current divided by independent reporting area
  M034_full_coupled_solve_marker = 1  // Current-run spf plus tds plus cd solve completed

Variables
  var_rxn "M03A.3 prescribed-current one-way Faradaic mapping; no kinetics" on selection sel_cathode_wall
    rN2 = FE_prescribed*j_cathodic_positive/(6*F_const_M033)  // Prescribed N2 consumption molar flux; not kinetics
    rNH3 = 2*rN2  // Prescribed NH3 generation molar flux; N2 + 6e- -> 2NH3
    j_signed_outward_M033 = -kappa_M033*(d(cd.phil,x)*nx+d(cd.phil,y)*ny)  // Raw signed outward-normal electrolyte current density
    j_cathodic_positive = j_signed_outward_M033  // Positive cathodic-current magnitude after explicit sign audit; no abs()
  var_M033_current "变量" on selection sel_electrolyte
    i_M033_x = -kappa_M033*d(cd.phil,x)
    i_M033_y = -kappa_M033*d(cd.phil,y)
    i_M033_mag = sqrt(i_M033_x^2+i_M033_y^2)

Selections
  sel_electrolyte: Box "Electrolyte domain"
    entitydim = 2
    xmin = -sel_tol
    xmax = Lcell+sel_tol
    ymin = -sel_tol
    ymax = Hcell+sel_tol
    condition = inside
  sel_inlet: Box "Inlet boundary"
    entitydim = 1
    xmin = -sel_tol
    xmax = sel_tol
    ymin = -sel_tol
    ymax = Hcell+sel_tol
    condition = inside
  sel_outlet: Box "Outlet boundary"
    entitydim = 1
    xmin = Lcell-sel_tol
    xmax = Lcell+sel_tol
    ymin = -sel_tol
    ymax = Hcell+sel_tol
    condition = inside
  sel_anode_wall: Box "Upper no-flux wall"
    entitydim = 1
    xmin = -sel_tol
    xmax = Lcell+sel_tol
    ymin = Hcell-sel_tol
    ymax = Hcell+sel_tol
    condition = inside
  sel_cathode_wall: Box "Lower reactive wall"
    entitydim = 1
    xmin = -sel_tol
    xmax = Lcell+sel_tol
    ymin = -sel_tol
    ymax = sel_tol
    condition = inside
  sel_all_boundaries: Box "All boundaries for closure"
    entitydim = 1
    xmin = -sel_tol
    xmax = Lcell+sel_tol
    ymin = -sel_tol
    ymax = Hcell+sel_tol
    condition = inside

Geometry
  geom1 "几何 1" (2D, length unit mm)
    r_channel: Rectangle "矩形" | size = {Lcell, Hcell}
    fin: Finalize "形成联合体"

Materials
  mat_electrolyte: Common "材料" on selection sel_electrolyte
    def: def "基本"
      density = rho_el
      dynamicviscosity = mu_el

Physics
  spf: LaminarFlow "层流" on selection sel_electrolyte
    dependent variable u = {u, v, w}
    ShapeProperty.order_fluid = 2
    fp1: FluidProperties "流体属性 1" (default)
    init1: init "初始值 1" (default)
    wallbc1: WallBC "壁 1" (default)
    wall_anode: WallBC "壁" on selection sel_anode_wall
    wall_cathode: WallBC "壁 2" on selection sel_cathode_wall
    inlet: Inlet "入口" on selection sel_inlet | BoundaryCondition = LaminarInflow; Uav = uin
    outlet: Outlet "出口" on selection sel_outlet
      BoundaryCondition = LaminarOutflow
      p0 = 0[Pa]
      LaminarOutflowOption = p0_exit
      p0_exit = 0[Pa]
  tds: DilutedSpecies "M02.1 N2/NH3 transport | PROVISIONAL — numerical audit only; not experimentally validated" on selection sel_electrolyte
    dependent variable cN2 = {cN2, cNH3}
    ShapeProperty.order_concentration = 2
    ShapeProperty.boundaryFlux_concentration = 1
    ShapeProperty.boundaryFluxSmooth_concentration = 0
    MassConsistentStabilization.massStreamlineDiffusion = 1
    MassConsistentStabilization.massCrosswindDiffusion = 1
    AdvancedSettings.ConvectiveTerm = cons
    cdm1: Fluid "流体 1" (default) | u = {u, v, 0}; D_cN2_mat = userdef; D_cN2 = DN2; D_cNH3_mat = userdef; D_cNH3 = DNH3
    nflx1: NoFlux "无通量 1" (default)
    init1: init "初始值 1" (default) | initc = {cN2_in, cNH3_in}
    conc_in: Concentration "浓度" (disabled) on selection sel_inlet | species = {1, 1}; c0 = {cN2_in, cNH3_in}
    inflow_audit: Inflow "流入" on selection sel_inlet | c0 = {cN2_in, cNH3_in}; BoundaryConditionType = FluxDanckwerts
    outflow: Outflow "流出" on selection sel_outlet
    noflux_anode: NoFlux "无通量" on selection sel_anode_wall
    flux_cathode: FluxBoundary "M03A.3 General Inward Flux from prescribed current; no kinetics" on selection sel_cathode_wall
      FluxType = GeneralInwardFlux
      species = {1, 1}
      J0 = {-rN2, rNH3}
  cd: PrimaryCurrentDistribution "M03A.3 Primary Current Distribution - pure ohmic synthetic field" on selection sel_electrolyte
    dependent variable phil
    ice1: Electrolyte "电解质 1" (default) | sigmal_mat = userdef; sigmal = kappa_M033
    ins1: Insulation "绝缘 1" (default)
    init1: init "初始值 1" (default)
    current_anode_M033: ElectrolyteCurrent "电解质电流 33" on selection sel_anode_wall
      IonicCurrentType = AverageCurrentDensity
      Ial = j_app_M033
    potential_cathode_M033: ElectrolytePotential "电解质电位 33" on selection sel_cathode_wall | philbnd = 0[V]

Mesh
  mesh1 "网格 1"
    size: MeshSizeDefault "大小" | hmax = 3.69; hmin = 0.0165; hcurve = 0.3; hgrad = 1.3
    map_channel: Map "映射" on selection sel_electrolyte
      dist_height: Distribution "分布" on selection sel_inlet | type = predefined; elemcount = 24
      dist_length: Distribution "分布 2" on selection sel_cathode_wall | type = predefined; elemcount = 64

Studies
  std_audit "M02.1 stationary transport audit"
    stat: Stationary "稳态" | usestol = on; stol = 1.0E-10

Solver configurations
  sol1 "解 1" (study std_audit)
    v1: Variables "因变量 1"
    s1: Stationary "稳态求解器 1"
      fc1: FullyCoupled "全耦合 1"
      d1: Direct "直接 (cd)"

Datasets
  dset1: Solution | solution = sol1
  m033_vertical_mid: CutLine2D "二维截线" | data = dset1; genpoints = {{27.5, 0}, {27.5, 4.8}}
  m033_center_point: CutPoint2D "二维截点" | data = dset1; pointx = 27.5; pointy = 2.4

Derived values
  n2_in_nt: IntLine "线积分" on selection sel_inlet | data = dset1; expr = tds.ntflux_cN2*Wcell; unit = mol/s; intorder = 8
  n2_out_nt: IntLine "线积分 2" on selection sel_outlet
    data = dset1
    expr = tds.ntflux_cN2*Wcell
    unit = mol/s
    intorder = 8
  nh3_in_nt: IntLine "线积分 3" on selection sel_inlet
    data = dset1
    expr = tds.ntflux_cNH3*Wcell
    unit = mol/s
    intorder = 8
  nh3_out_nt: IntLine "线积分 4" on selection sel_outlet
    data = dset1
    expr = tds.ntflux_cNH3*Wcell
    unit = mol/s
    intorder = 8
  n2_cath_nt: IntLine "线积分 5" on selection sel_cathode_wall
    data = dset1
    expr = tds.ntflux_cN2*Wcell
    unit = mol/s
    intorder = 8
  nh3_cath_nt: IntLine "线积分 6" on selection sel_cathode_wall
    data = dset1
    expr = tds.ntflux_cNH3*Wcell
    unit = mol/s
    intorder = 8
  n2_anode_nt: IntLine "线积分 7" on selection sel_anode_wall
    data = dset1
    expr = tds.ntflux_cN2*Wcell
    unit = mol/s
    intorder = 8
  nh3_anode_nt: IntLine "线积分 8" on selection sel_anode_wall
    data = dset1
    expr = tds.ntflux_cNH3*Wcell
    unit = mol/s
    intorder = 8
  n2_all_nt: IntLine "线积分 9" on selection sel_all_boundaries
    data = dset1
    expr = tds.ntflux_cN2*Wcell
    unit = mol/s
    intorder = 8
  nh3_all_nt: IntLine "线积分 10" on selection sel_all_boundaries
    data = dset1
    expr = tds.ntflux_cNH3*Wcell
    unit = mol/s
    intorder = 8
  n2_inlet_adv: IntLine "线积分 11" on selection sel_inlet
    data = dset1
    expr = (u*cN2*nx+v*cN2*ny)*Wcell
    unit = mol/s
    intorder = 8
  n2_inlet_diff: IntLine "线积分 12" on selection sel_inlet
    data = dset1
    expr = -DN2*(nx*cN2x+ny*cN2y)*Wcell
    unit = mol/s
    intorder = 8
  nh3_inlet_adv: IntLine "线积分 13" on selection sel_inlet
    data = dset1
    expr = (u*cNH3*nx+v*cNH3*ny)*Wcell
    unit = mol/s
    intorder = 8
  nh3_inlet_diff: IntLine "线积分 14" on selection sel_inlet
    data = dset1
    expr = -DNH3*(nx*cNH3x+ny*cNH3y)*Wcell
    unit = mol/s
    intorder = 8
  n2_outlet_adv: IntLine "线积分 15" on selection sel_outlet
    data = dset1
    expr = (u*cN2*nx+v*cN2*ny)*Wcell
    unit = mol/s
    intorder = 8
  n2_outlet_diff: IntLine "线积分 16" on selection sel_outlet
    data = dset1
    expr = -DN2*(nx*cN2x+ny*cN2y)*Wcell
    unit = mol/s
    intorder = 8
  nh3_outlet_adv: IntLine "线积分 17" on selection sel_outlet
    data = dset1
    expr = (u*cNH3*nx+v*cNH3*ny)*Wcell
    unit = mol/s
    intorder = 8
  nh3_outlet_diff: IntLine "线积分 18" on selection sel_outlet
    data = dset1
    expr = -DNH3*(nx*cNH3x+ny*cNH3y)*Wcell
    unit = mol/s
    intorder = 8
  n2_all_exp: IntLine "线积分 19" on selection sel_all_boundaries
    data = dset1
    expr = ((u*cN2*nx+v*cN2*ny)*Wcell)+((-DN2*(nx*cN2x+ny*cN2y)*Wcell))
    unit = mol/s
    intorder = 8
  nh3_all_exp: IntLine "线积分 20" on selection sel_all_boundaries
    data = dset1
    expr = ((u*cNH3*nx+v*cNH3*ny)*Wcell)+((-DNH3*(nx*cNH3x+ny*cNH3y)*Wcell))
    unit = mol/s
    intorder = 8
  n2_consumed: IntLine "线积分 21" on selection sel_cathode_wall
    data = dset1
    expr = reaction_on*rN2*Wcell
    unit = mol/s
    intorder = 8
  nh3_generated: IntLine "线积分 22" on selection sel_cathode_wall
    data = dset1
    expr = reaction_on*rNH3*Wcell
    unit = mol/s
    intorder = 8
  min_n2: MinSurface "表面最小值 2" on selection sel_electrolyte | data = dset1; expr = cN2; unit = mol/m^3
  min_nh3: MinSurface "表面最小值 3" on selection sel_electrolyte | data = dset1; expr = cNH3; unit = mol/m^3
  min_cath_n2: MinLine "线最小值 2" on selection sel_cathode_wall | data = dset1; expr = cN2; unit = mol/m^3
  avg_cath_n2: AvLine "线平均 2" on selection sel_cathode_wall | data = dset1; expr = cN2; unit = mol/m^3; intorder = 8
  m022_n2_in: IntLine "线积分 23" on boundaries 1 | data = dset1; expr = tds.ntflux_cN2*Wcell; unit = mol/s; intorder = 8
  m022_n2_out: IntLine "线积分 24" on boundaries 4 | data = dset1; expr = tds.ntflux_cN2*Wcell; unit = mol/s; intorder = 8
  m022_nh3_in: IntLine "线积分 25" on boundaries 1 | data = dset1; expr = tds.ntflux_cNH3*Wcell; unit = mol/s; intorder = 8
  m022_nh3_out: IntLine "线积分 26" on boundaries 4 | data = dset1; expr = tds.ntflux_cNH3*Wcell; unit = mol/s; intorder = 8
  m022_n2_cons: IntLine "线积分 27" on boundaries 2 | data = dset1; expr = rN2*Wcell; unit = mol/s; intorder = 8
  m022_nh3_gen: IntLine "线积分 28" on boundaries 2 | data = dset1; expr = rNH3*Wcell; unit = mol/s; intorder = 8
  m022_min_n2: MinSurface "表面最小值 2a" on domains 1 | data = dset1; expr = cN2; unit = mol/m^3
  m022_max_n2: MaxSurface "表面最大值 2" on domains 1 | data = dset1; expr = cN2; unit = mol/m^3
  m022_min_nh3: MinSurface "表面最小值 3a" on domains 1 | data = dset1; expr = cNH3; unit = mol/m^3
  m022_max_nh3: MaxSurface "表面最大值 3" on domains 1 | data = dset1; expr = cNH3; unit = mol/m^3
  m033_u_center: EvalPoint "点计算" | data = m033_center_point; expr = u; unit = m/s
  m033_u_mean: AvLine "线平均" | data = m033_vertical_mid; expr = u; unit = m/s
  m033_mdot_in: IntLine "线积分 29" on selection sel_inlet
    data = dset1
    expr = rho_el*(u*nx+v*ny)*Wcell
    unit = kg/s
    intorder = 8
  m033_mdot_out: IntLine "线积分 30" on selection sel_outlet
    data = dset1
    expr = rho_el*(u*nx+v*ny)*Wcell
    unit = kg/s
    intorder = 8
  m033_p_in: AvLine "线平均 3" on selection sel_inlet | data = dset1; expr = p; unit = Pa; intorder = 8
  m033_p_out: AvLine "线平均 4" on selection sel_outlet | data = dset1; expr = p; unit = Pa; intorder = 8
  m033_n2_in: IntLine "线积分 31" on selection sel_inlet
    data = dset1
    expr = tds.ntflux_cN2*Wcell
    unit = mol/s
    intorder = 8
  m033_n2_out: IntLine "线积分 32" on selection sel_outlet
    data = dset1
    expr = tds.ntflux_cN2*Wcell
    unit = mol/s
    intorder = 8
  m033_nh3_in: IntLine "线积分 33" on selection sel_inlet
    data = dset1
    expr = tds.ntflux_cNH3*Wcell
    unit = mol/s
    intorder = 8
  m033_nh3_out: IntLine "线积分 34" on selection sel_outlet
    data = dset1
    expr = tds.ntflux_cNH3*Wcell
    unit = mol/s
    intorder = 8
  m033_n2_cath: IntLine "线积分 35" on selection sel_cathode_wall
    data = dset1
    expr = tds.ntflux_cN2*Wcell
    unit = mol/s
    intorder = 8
  m033_nh3_cath: IntLine "线积分 36" on selection sel_cathode_wall
    data = dset1
    expr = tds.ntflux_cNH3*Wcell
    unit = mol/s
    intorder = 8
  m033_min_n2: MinSurface "表面最小值 2b" on selection sel_electrolyte | data = dset1; expr = cN2; unit = mol/m^3
  m033_min_nh3: MinSurface "表面最小值 3b" on selection sel_electrolyte | data = dset1; expr = cNH3; unit = mol/m^3
  m033_len_inlet: IntLine "线积分 37" on selection sel_inlet | data = dset1; expr = 1; unit = m; intorder = 8
  m033_len_outlet: IntLine "线积分 38" on selection sel_outlet | data = dset1; expr = 1; unit = m; intorder = 8
  m033_len_anode: IntLine "线积分 39" on selection sel_anode_wall | data = dset1; expr = 1; unit = m; intorder = 8
  m033_len_cathode: IntLine "线积分 40" on selection sel_cathode_wall | data = dset1; expr = 1; unit = m; intorder = 8
  m033_n2_imposed_cath: IntLine "线积分 41" on selection sel_cathode_wall
    data = dset1
    expr = rN2*Wcell
    unit = mol/s
    intorder = 8
  m033_nh3_imposed_cath: IntLine "线积分 42" on selection sel_cathode_wall
    data = dset1
    expr = rNH3*Wcell
    unit = mol/s
    intorder = 8
  m033_i_anode: IntLine "线积分 43" on selection sel_anode_wall
    data = dset1
    expr = (-kappa_M033*(d(cd.phil,x)*nx+d(cd.phil,y)*ny))*Wcell
    unit = A
    intorder = 8
  m033_i_cathode: IntLine "线积分 44" on selection sel_cathode_wall
    data = dset1
    expr = (-kappa_M033*(d(cd.phil,x)*nx+d(cd.phil,y)*ny))*Wcell
    unit = A
    intorder = 8
  m033_i_left: IntLine "线积分 45" on selection sel_inlet
    data = dset1
    expr = (-kappa_M033*(d(cd.phil,x)*nx+d(cd.phil,y)*ny))*Wcell
    unit = A
    intorder = 8
  m033_i_right: IntLine "线积分 46" on selection sel_outlet
    data = dset1
    expr = (-kappa_M033*(d(cd.phil,x)*nx+d(cd.phil,y)*ny))*Wcell
    unit = A
    intorder = 8
  m033_phi_anode: AvLine "线平均 5" on selection sel_anode_wall | data = dset1; expr = cd.phil; unit = V; intorder = 8
  m033_phi_cathode: AvLine "线平均 6" on selection sel_cathode_wall | data = dset1; expr = cd.phil; unit = V; intorder = 8
  m033_phi_linearity: MaxSurface "表面最大值" on selection sel_electrolyte
    data = dset1
    expr = abs(cd.phil-DeltaPhi_M033*y/Hcell)
    unit = V

Plots
  m022_pg_low_da: PlotGroup1D "M02.2 low-Da species - numerical verification" | data = dset1
    n2: LineGraph "线结果图 2" on selection sel_cathode_wall | expr = cN2; unit = mol/m^3
    nh3: LineGraph "线结果图 3" on selection sel_cathode_wall | expr = cNH3; unit = mol/m^3
  pg_M033_potential: PlotGroup2D "M03A.3 potential and prescribed current" | data = dset1
    surface: Surface "表面" | expr = cd.phil; unit = V
    arrows: ArrowSurface "面上箭头" | expr = {i_M033_x, i_M033_y}
  pg_M033_species: PlotGroup2D "M03A.3 low-conversion species fields" | data = dset1
    n2: Surface "表面 2" | expr = cN2; unit = mol/m^3
    nh3: Contour "等值线 3" | expr = cNH3; unit = mol/m^3

Exports
  m022_img_low_da: Image "图像" | source = /Results/ResultFeatureList/m022_pg_low_da; sourceobject = m022_pg_low_da
  img_M033_potential: Image "图像 2"
    source = /Results/ResultFeatureList/pg_M033_potential
    sourceobject = pg_M033_potential
    width = 1200
    height = 600
  img_M033_species: Image "图像 3"
    source = /Results/ResultFeatureList/pg_M033_species
    sourceobject = pg_M033_species
    width = 1200
    height = 600